<Lems>

    <!--

        This LEMS file has been automatically generated using PyNeuroML v1.1.12 (libNeuroML v0.5.8)

     -->

    <!-- Specify which component to run -->
    <Target component="ballandstick_netpyne"/>

    <!-- Include core NeuroML2 ComponentType definitions -->
    <Include file="Cells.xml"/>
    <Include file="Networks.xml"/>
    <Include file="Simulation.xml"/>

    <Include file="Ca_LVAst.channel.nml"/>
    <Include file="ballandstick.net.nml"/>
    <Include file="./Ih.channel.nml"/>
    <Include file="./K_Pst.channel.nml"/>
    <Include file="./K_Tst.channel.nml"/>
    <Include file="./Nap_Et2.channel.nml"/>
    <Include file="./NaTa_t.channel.nml"/>
    <Include file="./SKv3_1.channel.nml"/>
    <Include file="./SK_E2.channel.nml"/>
    <Include file="./pas.channel.nml"/>

    <Simulation id="ballandstick_netpyne" length="1000ms" step="0.025ms" target="ball_stick_net" seed="12345">  <!-- Note seed: ensures same random numbers used every run -->
        <OutputFile id="output0" fileName="v.netpyne.dat">
            <OutputColumn id="soma_v" quantity="ball_stick_pop/0/acell/0/v"/>
            <OutputColumn id="dend_v1" quantity="ball_stick_pop/0/acell/1/v"/>
            <OutputColumn id="dend_v2" quantity="ball_stick_pop/0/acell/2/v"/>
            <OutputColumn id="dend_v3" quantity="ball_stick_pop/0/acell/3/v"/>
        </OutputFile>

    </Simulation>

</Lems>
